<neuroml xmlns="http://www.neuroml.org/schema/neuroml2"  xmlns:xs="http://www.w3.org/2001/XMLSchema" xmlns:xsi="http://www.w3.org/2001/XMLSchema-instance" xsi:schemaLocation="http://www.neuroml.org/schema/neuroml2 https://raw.github.com/NeuroML/NeuroML2/development/Schemas/NeuroML2/NeuroML_v2beta5.xsd" id="SimpleNet">
    <notes>

This NeuroML 2 file was generated by OpenCortex v0.1.7 using:
    libNeuroML v0.2.34
    pyNeuroML v0.3.4

    </notes>
    <property tag="Network seed" value="1234"/>
    <include href="SimpleNet/RS.cell.nml"></include>
    <include href="AMPA_NMDA.synapse.nml"></include>
    <pulseGenerator id="pg0" delay="1000ms" duration="1000ms" amplitude="0.2nA"/>
    <spikeGeneratorPoisson id="poissonInput" averageRate="50Hz"/>
    <poissonFiringSynapse id="poissonFiringSyn100" averageRate="100 Hz" synapse="AMPA_noplast" spikeTarget="./AMPA_noplast"/>
    <network id="SimpleNet" type="networkWithTemperature" temperature="32degC">
        <population id="pop0" component="RS" size="7" type="populationList">
            <instance id="0">
                <location x="483.226769999999988" y="44.073259999999998" z="3.74574"/>
            </instance>
            <instance id="1">
                <location x="455.487979999999993" y="93.926900000000003" z="291.113789999999995"/>
            </instance>
            <instance id="2">
                <location x="335.781740000000013" y="8.39382" z="383.240470000000016"/>
            </instance>
            <instance id="3">
                <location x="118.404889999999995" y="3.0814" z="394.386360000000025"/>
            </instance>
            <instance id="4">
                <location x="173.044479999999993" y="62.328150000000001" z="307.907849999999996"/>
            </instance>
            <instance id="5">
                <location x="74.277320000000003" y="18.309059999999999" z="57.206479999999999"/>
            </instance>
            <instance id="6">
                <location x="7.30939" y="48.675150000000002" z="482.450780000000009"/>
            </instance>
        </population>
        <population id="pop1" component="RS" size="7" type="populationList">
            <instance id="0">
                <location x="32.281140000000001" y="154.108820000000009" z="232.949279999999987"/>
            </instance>
            <instance id="1">
                <location x="300.731719999999996" y="108.892880000000005" z="289.501340000000027"/>
            </instance>
            <instance id="2">
                <location x="134.792750000000012" y="155.643259999999998" z="322.317119999999989"/>
            </instance>
            <instance id="3">
                <location x="240.518190000000004" y="135.523910000000001" z="124.576059999999998"/>
            </instance>
            <instance id="4">
                <location x="466.757749999999987" y="145.338799999999992" z="265.080600000000004"/>
            </instance>
            <instance id="5">
                <location x="9.64978" y="150.810190000000006" z="2.89012"/>
            </instance>
            <instance id="6">
                <location x="71.884209999999996" y="147.282690000000002" z="188.673720000000003"/>
            </instance>
        </population>
        <projection id="proj1_pop0_pop1" presynapticPopulation="pop0" postsynapticPopulation="pop1" synapse="AMPA_NMDA">
            <connectionWD id="0" preCellId="../pop0/0/RS" postCellId="../pop1/0/RS" weight="1." delay="0 ms"/>
            <connectionWD id="1" preCellId="../pop0/0/RS" postCellId="../pop1/1/RS" weight="1." delay="0 ms"/>
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        </projection>
        <inputList id="Stim0" population="pop0" component="poissonFiringSyn100">
            <input id="0" target="../pop0/0/RS" destination="synapses" segmentId="0" fractionAlong="0.5"/>
            <input id="1" target="../pop0/0/RS" destination="synapses" segmentId="0" fractionAlong="0.5"/>
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        </inputList>
        <inputList id="Stim1" population="pop0" component="pg0">
            <input id="0" target="../pop0/0/RS" destination="synapses" segmentId="0" fractionAlong="0.5"/>
            <input id="1" target="../pop0/1/RS" destination="synapses" segmentId="0" fractionAlong="0.5"/>
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        </inputList>
    </network>
</neuroml>
